OpenVSP model (file version 5), 10 components.
Geometry view with OpenVSP parameter names; values to 6 digits, angles in degrees, lengths in the model's unit.
Overall bounding box: X_Min=-11.1584 X_Len=953.484 Y_Min=-426.545 Y_Len=853.091 Z_Min=-118.982 Z_Len=244.061

Fuselage "VehicleGeomV1"
  location (X Y Z) 0 0 0, rotation 0 0 0
  bounding box size 904.28 115.232 115
  Design: Length=900
  cross sections:
    n  XLocPercent  YLocPercent  ZLocPercent  shape
    0  0            0            0            rounded rectangle RoundRectXSec_Radius=8.85214 RoundedRect_Height=20 RoundedRect_Width=30
    1  0.190574     0            0            super ellipse Super_Height=80 Super_M=2.22286 Super_MaxWidthLoc=0 Super_N=2.51786 Super_Width=90
    2  0.375        0            0            as above
    3  0.5          0            0            as above
    4  0.625        0            0            edit curve Width=110 Height=87.3418 AbsoluteFlag=1 SymType=1 PCHIP points (X Y): 0.523026 -0.00365497, 0.5 -0.157164, 0.407895 -0.412676, 0.203947 -0.520666, 0 -0.559234, -0.203947 -0.520666, -0.407895 -0.412676, -0.5 -0.157164, -0.523026 -0.00365497, -0.493421 0.175439, -0.353553 0.353553, -0.158114 0.474342, 0 0.5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
    5  0.75         0            0            rounded rectangle RoundRectXSec_Radius=30 RoundedRect_Height=115 RoundedRect_Width=115
    6  1            0            0            edit curve Width=115 Height=115 AbsoluteFlag=0 SymType=1 cubic Bezier points (X Y): 0.453947 0.00657895, 0.453947 -0.270088, 0.276667 -0.5, 0 -0.5, -0.276667 -0.5, -0.453947 -0.270088, -0.453947 0.00657895, -0.453947 0.283246, -0.276667 0.5, 0 0.5, 0.276667 0.5, 0.453947 0.283246, 0.453947 0.00657895

Wing "WingGeom", child of "VehicleGeomV1"
  location (X Y Z) 525 0 0, rotation 0 0 0
  symmetric about XZ
  bounding box size 360.019 853.091 37.3469
  totals: TotalSpan=840.606 TotalProjectedSpan=840.606 TotalChord=243.808 TotalArea=176539 TotalAR=4.00262 MAC=231.755
  root: chord 360, twist 0, NACA 64-series A=1 IdealCl=0.192857 Invert=1 ThickChord=0.103571
  sections:
    n  Span     Root_Chord  Tip_Chord  Area     Sweep  Sweep_Location  Dihedral  Twist  Twist_Location  tip airfoil
    1  90       360         284.481    29001.6  40     0               0         0      0.25            as above
    2  57.5758  284.481     201.942    14003.1  40     0               0         0      0.25            as above
    3  272.727  201.942     130        45264.8  -15    0               0         0      0.25            as above

Wing "CanardGeom", child of "VehicleGeomV1"
  location (X Y Z) 250 0 0, rotation 0 0 0
  symmetric about XZ
  bounding box size 186.821 341.094 21.6873
  totals: TotalSpan=334.661 TotalProjectedSpan=334.661 TotalChord=155.116 TotalArea=48593 TotalAR=2.30482 MAC=157.505
  root: chord 186.821, twist 0, NACA 63-series A=1 IdealCl=0 ThickChord=0.116071
  sections:
    n  Span     Root_Chord  Tip_Chord  Area     Sweep  Sweep_Location  Dihedral  Twist  Twist_Location  tip airfoil
    1  57.5     186.821     186.821    10742.2  0      0               0         0      0.25            as above
    2  109.831  186.821     60         13554.3  30     0               0         0      0.25            as above

Wing "TailGeom", child of "VehicleGeomV1"
  location (X Y Z) 710 72 0, rotation 90 0 0
  symmetric about XY, XZ
  bounding box size 232.319 290.142 237.963
  totals: TotalSpan=250 TotalProjectedSpan=216.506 TotalChord=160 TotalArea=40000 TotalAR=1.17188 MAC=160
  root: chord 160, twist 0, NACA 4-series Camber=0 CamberLoc=0.188571 ThickChord=0.0892857
  sections:
    n  Span  Root_Chord  Tip_Chord  Area   Sweep  Sweep_Location  Dihedral  Twist  Twist_Location  tip airfoil
    1  125   160         160        20000  30     0               -30       0      0.25            CST airfoil ContLERad=1 LowDegree=7 ThickChord=0.088812 UpDegree=7 Au=[0.12905 0.111376 0.131664 0.0931264 0.122497 0.0958904 0.106713 0.104689] Al=[-0.12905 -0.111376 -0.131664 -0.0931264 -0.122497 -0.0958904 -0.106713 -0.104689]

Fuselage "InletGeom", child of "VehicleGeomV1"
  location (X Y Z) 460 0 85, rotation 0 0 0
  bounding box size 183.16 100.581 170.08
  Design: Length=175
  cross sections:
    n  XLocPercent  YLocPercent  ZLocPercent  shape
    0  0            0            0            super ellipse Super_Height=80 Super_M=1.94507 Super_M_bot=4.13333 Super_MaxWidthLoc=-0.5 Super_N=2.02175 Super_N_bot=3.64859 Super_TopBotSym=0 Super_Width=100
    1  0.125        0            0            as above
    2  0.324053     0            -0.0285714   as above
    3  0.659413     0            -0.271993    super ellipse Super_Height=92 Super_M=1.94507 Super_M_bot=4.13333 Super_MaxWidthLoc=-0.5 Super_N=2.02175 Super_N_bot=3.64859 Super_TopBotSym=0 Super_Width=100
    4  0.875        0            -0.476692    super ellipse Super_Height=80 Super_M=1.94507 Super_M_bot=4.13333 Super_MaxWidthLoc=-0.5 Super_N=2.02175 Super_N_bot=3.64859 Super_TopBotSym=0 Super_Width=100
    5  1            0            -0.514286    as above

Fuselage "VehicleGeomV2"
  location (X Y Z) 0 0 0, rotation 0 0 0
  bounding box size 911.158 172.377 135
  Design: Length=900
  cross sections:
    n  XLocPercent  YLocPercent  ZLocPercent  shape
    0  0            0            -0.0163934   edit curve Width=55 Height=35.9184 AbsoluteFlag=0 SymType=1 cubic Bezier points (X Y): 0.5 0, 0.5 -0.166667, 0.467105 -0.291701, 0.467105 -0.458368, 0.300439 -0.458368, 0.166667 -0.5, 0 -0.5, -0.166667 -0.5, -0.300439 -0.458368, -0.467105 -0.458368, -0.467105 -0.291701, -0.5 -0.166667, -0.5 0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
    1  0.146029     0            0            edit curve Width=135 Height=125 AbsoluteFlag=0 SymType=1 PCHIP points (X Y): 0.401316 -0.0746053, 0.388158 -0.2025, 0.328947 -0.344605, 0.197368 -0.4725, 0 -0.5, -0.197368 -0.4725, -0.328947 -0.344605, -0.388158 -0.2025, -0.401316 -0.0746053, -0.368421 0.0817105, -0.286184 0.184737, -0.157895 0.266447, 0 0.284211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
    2  0.282787     0            0            edit curve Width=135 Height=125 AbsoluteFlag=0 SymType=1 PCHIP points (X Y): 0.417763 -0.0746053, 0.401316 -0.195395, 0.328947 -0.344605, 0.197368 -0.4725, 0 -0.5, -0.197368 -0.4725, -0.328947 -0.344605, -0.401316 -0.195395, -0.417763 -0.0746053, -0.401316 0.0888158, -0.302632 0.209605, -0.157895 0.266447, 0 0.284211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
    3  0.375        0            0            as above
    4  0.5          0            0            edit curve Width=135 Height=125 AbsoluteFlag=0 SymType=1 PCHIP points (X Y): 0.427632 -0.0532895, 0.411184 -0.241579, 0.3125 -0.376579, 0.197368 -0.4725, 0 -0.5, -0.197368 -0.4725, -0.3125 -0.376579, -0.411184 -0.241579, -0.427632 -0.0532895, -0.394737 0.106579, -0.309211 0.227368, -0.190789 0.284211, 0 0.298421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
    5  0.625        0            0            edit curve Width=135 Height=125 AbsoluteFlag=0 SymType=1 PCHIP points (X Y): 0.45 0, 0.424342 -0.195395, 0.328947 -0.344605, 0.197368 -0.4725, 0 -0.5, -0.197368 -0.4725, -0.328947 -0.344605, -0.424342 -0.195395, -0.45 0, -0.411184 0.135, -0.322368 0.241579, -0.177632 0.326842, 0 0.351711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
    6  0.75         0            0            edit curve Width=135 Height=135 AbsoluteFlag=0 SymType=1 PCHIP points (X Y): 0.638158 0, 0.490132 -0.154605, 0.346701 -0.360277, 0.185254 -0.464415, 0 -0.5, -0.185254 -0.464415, -0.346701 -0.360277, -0.490132 -0.154605, -0.638158 0, -0.486842 0.154605, -0.346701 0.360277, -0.185254 0.464415, 0 0.5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
    7  0.973361     0            0            as above
    8  1            0            0            circle Circle_Diameter=120

Wing "WingGeom", child of "VehicleGeomV2"
  location (X Y Z) 525 0 0, rotation 0 0 0
  symmetric about XZ
  bounding box size 360.019 853.091 37.3469
  totals: TotalSpan=840.606 TotalProjectedSpan=840.606 TotalChord=243.808 TotalArea=176539 TotalAR=4.00262 MAC=231.755
  root: chord 360, twist 0, NACA 64-series A=1 IdealCl=0.192857 Invert=1 ThickChord=0.103571
  sections:
    n  Span     Root_Chord  Tip_Chord  Area     Sweep  Sweep_Location  Dihedral  Twist  Twist_Location  tip airfoil
    1  90       360         284.481    29001.6  40     0               0         0      0.25            as above
    2  57.5758  284.481     201.942    14003.1  40     0               0         0      0.25            as above
    3  272.727  201.942     130        45264.8  -15    0               0         0      0.25            as above

Wing "CanardGeom", child of "VehicleGeomV2"
  location (X Y Z) 250 0 0, rotation 0 0 0
  symmetric about XZ
  bounding box size 186.821 341.094 21.6873
  totals: TotalSpan=334.661 TotalProjectedSpan=334.661 TotalChord=155.116 TotalArea=48593 TotalAR=2.30482 MAC=157.505
  root: chord 186.821, twist 0, NACA 63-series A=1 IdealCl=0 ThickChord=0.116071
  sections:
    n  Span     Root_Chord  Tip_Chord  Area     Sweep  Sweep_Location  Dihedral  Twist  Twist_Location  tip airfoil
    1  57.5     186.821     186.821    10742.2  0      0               0         0      0.25            as above
    2  109.831  186.821     60         13554.3  30     0               0         0      0.25            as above

Wing "TailGeom", child of "VehicleGeomV2"
  location (X Y Z) 710 72 0, rotation 90 0 0
  symmetric about XY, XZ
  bounding box size 232.085 283.489 235.771
  totals: TotalSpan=250 TotalProjectedSpan=216.506 TotalChord=160 TotalArea=40000 TotalAR=1.17188 MAC=159.835
  root: chord 160, twist 6.37795, NACA 4-series Camber=0 CamberLoc=0.188571 ThickChord=0.0892857
  sections:
    n  Span  Root_Chord  Tip_Chord  Area   Sweep  Sweep_Location  Dihedral  Twist  Twist_Location  tip airfoil
    1  125   160         160        20000  30     0               -30       0      0.25            NACA 4-series Camber=0 CamberLoc=0.254286 ThickChord=0.0678571

Fuselage "InletGeom", child of "VehicleGeomV2"
  location (X Y Z) 455 0 90, rotation 0 0 0
  bounding box size 262.5 139.548 175.869
  Design: Length=225
  cross sections:
    n  XLocPercent  YLocPercent  ZLocPercent  shape
    0  0            0            -0.0325853   super ellipse Super_Height=75 Super_M=2 Super_M_bot=2.68643 Super_MaxWidthLoc=-0.242857 Super_N=2 Super_N_bot=2 Super_TopBotSym=0 Super_Width=115
    1  0.172131     0            -0.0325853   as above
    2  0.385279     0            -0.112172    super ellipse Super_Height=100 Super_M=2 Super_M_bot=2.68643 Super_MaxWidthLoc=0 Super_N=2 Super_N_bot=2 Super_TopBotSym=0 Super_Width=110
    3  0.56764      0            -0.188525    as above
    4  0.75         0            -0.283795    super ellipse Super_Height=105 Super_M=2 Super_M_bot=2.68643 Super_MaxWidthLoc=0 Super_N=2 Super_N_bot=2 Super_TopBotSym=0 Super_Width=110
    5  0.892418     0            -0.4         edit curve Width=110 Height=110 AbsoluteFlag=0 SymType=0 cubic Bezier points (X Y): 0.5 0, 0.5 -0.275958, 0.275958 -0.5, 0 -0.5, -0.275958 -0.5, -0.5 -0.275958, -0.5 0, -0.5 0.275958, -0.282536 0.569079, 0 0.569079, 0.269379 0.569079, 0.5 0.275958, 0.5 0
    6  1            0            -0.4         circle Circle_Diameter=110

VSPAERO settings (reference component "WingGeom"): Sref=176539 bref=840.606 cref=243.808 Xcg=0 Ycg=0 Zcg=0 AlphaStart=1 AlphaEnd=10 AlphaNpts=5 BetaStart=0 BetaEnd=0 BetaNpts=1 MachStart=0 MachEnd=0 MachNpts=1 ReCref=1e+07 Vinf=100 Rho=0.002377
