OpenVSP model (file version 5), 9 components.
Geometry view with OpenVSP parameter names; values to 6 digits, angles in degrees, lengths in the model's unit.
Overall bounding box: X_Min=-16.7213 X_Len=659.197 Y_Min=-406.512 Y_Len=813.024 Z_Min=-115 Z_Len=230

Fuselage "FuselageGeom"
  location (X Y Z) 0 0 0, rotation 0 0 0
  bounding box size 623.393 240 106.853
  mass: Density=0 Shell_Flag=1 Mass_Area=0.001 Mass_Prior=0
  Design: Length=590
  cross sections:
    n  XLocPercent  YLocPercent  ZLocPercent  shape
    0  0            0            0            ellipse Ellipse_Height=40 Ellipse_Width=100
    1  0.0773157    0            0            ellipse Ellipse_Height=70 Ellipse_Width=120
    2  0.238798     0            0            ellipse Ellipse_Height=80 Ellipse_Width=145
    3  0.533333     0            0            edit curve Width=240 Height=115 AbsoluteFlag=0 SymType=1 PCHIP points (X Y): 0.5 0, 0.426835 -0.260393, 0.294574 -0.404021, 0.163236 -0.446479, 0 -0.4465, -0.163236 -0.446479, -0.294574 -0.404021, -0.426835 -0.260393, -0.5 0, -0.426835 0.260393, -0.294574 0.404021, -0.158289 0.472287, 0 0.423909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
    4  0.733333     0            0            as above
    5  0.880874     0            0            as above
    6  1            0            0            edit curve Width=240 Height=115 AbsoluteFlag=0 SymType=1 PCHIP points (X Y): 0.5 0, 0.426835 -0.260393, 0.294574 -0.404021, 0.163236 -0.446479, 0 -0.4465, -0.163236 -0.446479, -0.294574 -0.404021, -0.426835 -0.260393, -0.5 0, -0.426835 0.260393, -0.294574 0.404021, -0.158289 0.472287, 0 0.400025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

Fuselage "leftEDF", child of "FuselageGeom"
  location (X Y Z) 491.742 -60 0, rotation 0 0 0
  bounding box size 100 82 82
  mass: Density=0 Shell_Flag=0 Mass_Area=1 Mass_Prior=0 PointMass=250 CGx=0 CGy=0 CGz=0 Ixx=0 Iyy=0 Izz=0 Ixy=0 Ixz=0 Iyz=0
  Design: Length=100
  cross sections:
    n  XLocPercent  YLocPercent  ZLocPercent  shape
    0  0            0            0            circle Circle_Diameter=82
    1  0.25         0            0            as above
    2  0.5          0            0            as above
    3  0.75         0            0            as above
    4  1            0            0            as above

Fuselage "rightEDF", child of "FuselageGeom"
  location (X Y Z) 491.742 60 0, rotation 0 0 0
  bounding box size 100 82 82
  mass: Density=0 Shell_Flag=0 Mass_Area=1 Mass_Prior=0 PointMass=250 CGx=0 CGy=0 CGz=0 Ixx=0 Iyy=0 Izz=0 Ixy=0 Ixz=0 Iyz=0
  Design: Length=100
  cross sections:
    n  XLocPercent  YLocPercent  ZLocPercent  shape
    0  0            0            0            circle Circle_Diameter=82
    1  0.25         0            0            as above
    2  0.5          0            0            as above
    3  0.75         0            0            as above
    4  1            0            0            as above

Wing "Rwing", child of "FuselageGeom"
  location (X Y Z) 328.972 0 0, rotation 0 0 0
  bounding box size 268.887 400 20.8386
  mass: Density=0 Shell_Flag=1 Mass_Area=0.001 Mass_Prior=0
  totals: TotalSpan=400 TotalProjectedSpan=400 TotalChord=137.5 TotalArea=55000 TotalAR=2.90909 MAC=137.879
  root: chord 150, twist 0, NACA 4-series Camber=0.0383333 CamberLoc=0.354286 ThickChord=0.118519
  sections:
    n  Span  Root_Chord  Tip_Chord  Area   Sweep    Sweep_Location  Dihedral  Twist  Twist_Location  tip airfoil
    1  400   150         125        55000  19.7778  0               0         0      0               NACA 4-series Camber=0 CamberLoc=0.2 ThickChord=0.1
  SS_Control "R_Elevon": UStart=0.492386 UEnd=0.64467 Length_C_Start=0.29 Length_C_End=0.29 Length_Start=40.0406 Length_End=36.7284 LE_Flag=0 Surf_Type=2

Wing "TailGeom", child of "Rwing"
  location (X Y Z) 472.806 400 0, rotation 90 0 0; relative location 0 0 0, rotation 90 0 0
  symmetric about XY, XZ
  bounding box size 169.67 813.024 230
  mass: Density=0 Shell_Flag=1 Mass_Area=0.001 Mass_Prior=0
  totals: TotalSpan=230 TotalProjectedSpan=230 TotalChord=108.709 TotalArea=21417 TotalAR=2.47 MAC=98.376
  root: chord 130.165, twist 0, NACA 4-series Camber=0 CamberLoc=0.2 ThickChord=0.1
  sections:
    n  Span  Root_Chord  Tip_Chord  Area     Sweep  Sweep_Location  Dihedral  Twist  Twist_Location  tip airfoil
    1  10    130.165     125        1275.83  45     0               0         0      0.25            as above
    2  105   125         54.6699    9432.67  45     0               0         0      0.25            as above

Fuselage "InletGeom", child of "FuselageGeom"
  location (X Y Z) 269.898 120 0, rotation 0 0 0
  symmetric about XZ
  bounding box size 366.207 408.155 72
  mass: Density=0 Shell_Flag=1 Mass_Area=0.001 Mass_Prior=0
  Design: Length=350
  cross sections:
    n  XLocPercent  YLocPercent  ZLocPercent  shape
    0  0            0.121796     0            ellipse Ellipse_Height=47 Ellipse_Width=80
    1  0.0806865    0.121796     0            as above
    2  0.166731     0.089791     0            as above
    3  0.25         0.0428053    0            as above
    4  0.375        -0.046941    0            as above
    5  0.5          -0.135975    0            ellipse Ellipse_Height=50 Ellipse_Width=72
    6  0.625        -0.171429    0            circle Circle_Diameter=70
    7  0.75         -0.171429    0            circle Circle_Diameter=72
    8  0.947368     -0.171429    0            as above
    9  1            -0.171429    0            circle Circle_Diameter=60

Wing "Lwing", child of "FuselageGeom"
  location (X Y Z) 328.972 0 0, rotation 180 0 0
  bounding box size 268.887 400 20.8386
  mass: Density=0 Shell_Flag=1 Mass_Area=0.001 Mass_Prior=0
  totals: TotalSpan=400 TotalProjectedSpan=400 TotalChord=137.5 TotalArea=55000 TotalAR=2.90909 MAC=137.879
  root: chord 150, twist 0, NACA 4-series Camber=0.0383333 CamberLoc=0.354286 ThickChord=0.118519
  sections:
    n  Span  Root_Chord  Tip_Chord  Area   Sweep    Sweep_Location  Dihedral  Twist  Twist_Location  tip airfoil
    1  400   150         125        55000  19.7778  0               0         0      0               NACA 4-series Camber=0 CamberLoc=0.2 ThickChord=0.1
  SS_Control "L_Elevon": UStart=0.492386 UEnd=0.64467 Length_C_Start=0.29 Length_C_End=0.29 Length_Start=40.0406 Length_End=36.7284 LE_Flag=0 Surf_Type=2

Blank "Battery"
  location (X Y Z) 215 0 0, rotation 0 0 0
  mass: Density=1 Shell_Flag=0 Mass_Area=1 Mass_Prior=0 PointMass=750 CGx=0 CGy=0 CGz=0 Ixx=0 Iyy=0 Izz=0 Ixy=0 Ixz=0 Iyz=0

Blank "Electronics"
  location (X Y Z) 20.1011 0 0, rotation 0 0 0
  mass: Density=1 Shell_Flag=0 Mass_Area=1 Mass_Prior=0 PointMass=225 CGx=0 CGy=0 CGz=0 Ixx=0 Iyy=0 Izz=0 Ixy=0 Ixz=0 Iyz=0

VSPAERO settings (reference component "Rwing"): Sref=110000 bref=800 cref=137.879 Xcg=413.435 Ycg=-9.95833e-07 Zcg=0.818557 AlphaStart=-8 AlphaEnd=24 AlphaNpts=17 BetaStart=0 BetaEnd=0 BetaNpts=1 MachStart=0.0390997 MachEnd=0 MachNpts=1 ReCref=1e+07 Vinf=100 Rho=0.002377
  control group "Unnamed Control Group": DeflectionAngle=0
