OpenVSP model (file version 5), 3 components.
Geometry view with OpenVSP parameter names; values to 6 digits, angles in degrees, lengths in the model's unit.
Overall bounding box: X_Min=-12.4783 X_Len=824.228 Y_Min=-353.192 Y_Len=706.385 Z_Min=-39.229 Z_Len=78.458

Fuselage "FuselageGeom"
  location (X Y Z) 0 0 0, rotation 0 0 0
  bounding box size 824.228 80.0007 78.458
  Design: Length=800
  cross sections:
    n  XLocPercent  YLocPercent  ZLocPercent  shape
    0  0            0            0            ellipse Ellipse_Height=32.0612 Ellipse_Width=60
    1  0.190574     0            0            super ellipse Super_Height=70 Super_M=2.39143 Super_MaxWidthLoc=-0.3 Super_N=2 Super_Width=80
    2  0.5          0            0            as above
    3  0.75         0            0            as above
    4  1            0            0            as above

Wing "WingGeom", child of "FuselageGeom"
  location (X Y Z) 370 0 0, rotation 0 0 0
  symmetric about XZ
  bounding box size 430 706.385 43.025
  totals: TotalSpan=700 TotalProjectedSpan=700 TotalChord=255 TotalArea=178500 TotalAR=2.7451 MAC=295.033
  root: chord 430, twist 0, NACA 4-series Camber=0 CamberLoc=0.2 ThickChord=0.1
  sections:
    n  Span  Root_Chord  Tip_Chord  Area   Sweep  Sweep_Location  Dihedral  Twist  Twist_Location  tip airfoil
    1  350   430         80         89250  45     0               0         0      0.25            as above

Wing "CanardGeom", child of "FuselageGeom"
  location (X Y Z) 80 0 0, rotation 0 0 0
  symmetric about XZ
  bounding box size 210.91 300 20.0116
  totals: TotalSpan=300 TotalProjectedSpan=300 TotalChord=130.455 TotalArea=39136.6 TotalAR=2.29964 MAC=142.813
  root: chord 200, twist 0, NACA 4-series Camber=0 CamberLoc=0.2 ThickChord=0.1
  sections:
    n  Span  Root_Chord  Tip_Chord  Area     Sweep  Sweep_Location  Dihedral  Twist  Twist_Location  tip airfoil
    1  150   200         60.9103    19568.3  45     0               0         0      0.25            as above
